** ***************************************************************************
**   Written by : Femap
**   Version    : 11.0.1
**   From Model : C:\Users\kwl\Desktop\Research\python\examples\example1.modfem
**   Date       : Sun Sep 11 00:10:42 2016
** ***************************************************************************
**
*HEADING
ABAQUS Static Analysis Set
*NODE, NSET=GLOBAL
       1,          0.,          0.,          0.
       2,        0.25,          0.,          0.
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*ELEMENT, TYPE=CPE4, ELSET=P1
      1,      1,      2,     25,     24
      2,      2,      3,     26,     25
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*ELSET, ELSET=OUT_CONT, GENERATE
1,32,1
** Femap Property 1 : elastic
*SOLID SECTION, ELSET=P1, MATERIAL=M1, REF NODE=0
        1.
** Femap Material 1 : elastic
*MATERIAL, NAME=M1
*ELASTIC, TYPE=ISOTROPIC
     1000.,       0.3,        0.
** Load Step 1 -------------------------------------------------------
*STEP, INC=100
Untitled
*STATIC

*NODE PRINT, FREQUENCY=1
    U,
*FILE FORMAT, ASCII
*NODE FILE, FREQUENCY=1
    U,
*NODE FILE, FREQUENCY=1
   CF,
*NODE FILE, FREQUENCY=1
   RF,
*EL PRINT, ELSET=OUT_CONT,FREQUENCY=1, POSITION=CENTROIDAL
    S,
 SINV,
*EL PRINT, ELSET=OUT_CONT,FREQUENCY=1,	POSITION=NODES
    S,
 SINV,
*EL FILE, ELSET=OUT_CONT,FREQUENCY=1, POSITION=CENTROIDAL
    S,
 SINV,
*EL FILE, ELSET=OUT_CONT,FREQUENCY=1,	POSITION=NODES
    S,
 SINV,
*EL PRINT, ELSET=OUT_CONT,FREQUENCY=1, POSITION=CENTROIDAL
*EL PRINT, ELSET=OUT_CONT,FREQUENCY=1,	POSITION=NODES
*EL FILE, ELSET=OUT_CONT,FREQUENCY=1, POSITION=CENTROIDAL
*EL FILE, ELSET=OUT_CONT,FREQUENCY=1,	POSITION=NODES
*END STEP
