** ***************************************************************************
**   Written by : Femap
**   Version    : 11.4.0
**   From Model :
**   Date       : Tue Oct 16 08:24:22 2018
** ***************************************************************************
**
*HEADING
ABAQUS Static Analysis Set
*NODE, NSET=GLOBAL
       1,        -0.5,        -0.5,          2.
       2,          0.,        -0.5,          2.
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*ELEMENT, TYPE=C3D10, ELSET=P1
     81,      4,      5,     26,     55,     79,    136,    166,    185,
            186,    187
     82,      5,      6,     26,     55,     80,    135,    136,    186,
            188,    187
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*ELSET, ELSET=OUT_CONT, GENERATE
81,212,1
** Femap Property 1 : SOLID Property
*ORIENTATION, NAME=S0, DEFINITION=COORDINATES, SYSTEM=RECTANGULAR
        1.,        0.,        0.,        0.,        1.,        0.
*SOLID SECTION, ELSET=P1, MATERIAL=M1, ORIENTATION=S0
** Femap Material 1 : ISOTROPIC Material
*MATERIAL, NAME=M1
*ELASTIC, TYPE=ISOTROPIC
        1.,       0.3,        0.
** Load Step 1 -------------------------------------------------------
*STEP, INC=100
Untitled
*STATIC

*NODE PRINT, FREQUENCY=1
    U,
*FILE FORMAT, ASCII
*NODE FILE, FREQUENCY=1
    U,
*NODE FILE, FREQUENCY=1
   CF,
*NODE FILE, FREQUENCY=1
   RF,
*EL PRINT, ELSET=OUT_CONT,FREQUENCY=1, POSITION=CENTROIDAL
    S,
 SINV,
*EL PRINT, ELSET=OUT_CONT,FREQUENCY=1,	POSITION=NODES
    S,
 SINV,
*EL FILE, ELSET=OUT_CONT,FREQUENCY=1, POSITION=CENTROIDAL
    S,
 SINV,
*EL FILE, ELSET=OUT_CONT,FREQUENCY=1,	POSITION=NODES
    S,
 SINV,
*EL PRINT, ELSET=OUT_CONT,FREQUENCY=1, POSITION=CENTROIDAL
*EL PRINT, ELSET=OUT_CONT,FREQUENCY=1,	POSITION=NODES
*EL FILE, ELSET=OUT_CONT,FREQUENCY=1, POSITION=CENTROIDAL
*EL FILE, ELSET=OUT_CONT,FREQUENCY=1,	POSITION=NODES
*END STEP
