*HEADING
ABAQUS Static Analysis Set
*NODE, NSET=GLOBAL
       1,          0.,          0.,          0.
       2,        0.05,          0.,          0.
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** NODES = 4
** TYPE=U1 (plane strain)
** IPROPERTIES = 9 (number of state vars per integration point)
** PROPERTIES = E,nu (2 properties for linear elasticity)
** COORDINATES = 2 at each node
** VARIABLES = 4*9 = 36 (total number of state vars per ELEMENT)
** UNSYMM = use unsymmetric solver for F-bar method
** All dofs are displacements 1,2
*User Element,Nodes=4,Type=U1,Iproperties=1,Properties=2,Coordinates=2,Variables=36,Unsymm
1,2
*ELEMENT, TYPE=U1, ELSET=user_elements
      1,      1,      2,     81,     80
      2,      2,      3,     82,     81
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*Element, type=CPE4, elset=dummy_elements
10001,1,2,81,80
10002,2,3,82,81
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************************************************************************
**			NODE GROUPS
************************************************************************
** Femap Group 1 : left_nodes
*NSET, NSET=Gleft_nodes
1,61,62,63,64,65
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** Femap Group 2 : right_nodes
*NSET, NSET=Gright_nodes_A
22,23,24,25,26,27
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** Femap Group 3 : right_nodes_B
*NSET, NSET=Gright_nodes_B
21,41
************************************************************************
**			MATERIAL DEFINITION
************************************************************************
**
** Material properties for the real material
**
** properties are:
** PROPS[0] = lambda (K)
** PROPS[1] = mu (G)
** JPROPS[0] = 9 (number of state variables per integration point)
** lambda/mu = 2 --> poisson ~ 0.3333
** lambda/mu = 1000 --> poisson ~ 0.4995
** nu = (lambda/mu)/(2*(lambda/mu + 1))
*uel property,elset=user_elements
1.e4,1.0,9
**
** Material properties for the dummy sections
**
*Solid section, elset=dummy_elements, material=Material-dummy
1.0
*Material, name=Material-dummy
*Elastic
1.e-20,0.
**
****************************************
*STEP, UNSYMM=YES, NLGEOM=YES, INC=50000
****************************************
*STATIC
0.01, 1.0, 1.e-8,
*BOUNDARY
    1,    1
    1,    2
   61,    1
   62,    1
   63,    1
   64,    1
   65,    1
   66,    1
   67,    1
   68,    1
   69,    1
   70,    1
   71,    1
   72,    1
   73,    1
   74,    1
   75,    1
   76,    1
   77,    1
   78,    1
   79,    1
   80,    1
**** Apply displacement at nodes 2,3
***BOUNDARY
**2, 1,, 1.0
**3, 1,, 1.0
**
*CLOAD
Gright_nodes_A, 1, 0.1
Gright_nodes_B, 1, 0.05
*OUTPUT, FIELD, FREQ=1
*Node Output, nset=GLOBAL
 U
***Element Output
** S,E
*OUTPUT, HISTORY, FREQ=1
*Node Output, nset=Gleft_nodes
RF
*END STEP
